# OpenSim document version 20302
MarkerSet gait2354_Scale:
  Marker Hips: pelvis (0 0 0)
    # Used for displaying a marker in the visuals.
  Marker Spine: pelvis (0 0 0)
    # Used for displaying a marker in the visuals.
  Marker Spine1: abdomen (0 0 0)
    # Used for displaying a marker in the visuals.
  Marker Neck: cervix (0 0 0)
    # Used for displaying a marker in the visuals.
  Marker Head: caput (0 0 0)
    # Used for displaying a marker in the visuals.
  Marker Head_End: caput (-0.00119 -0.18 -0.001684)
    # Used for displaying a marker in the visuals.
  Marker LeftShoulder: left_scapula (0 0 0)
    # Used for displaying a marker in the visuals.
  Marker LeftArm: left_humerus (0 0 0)
    # Used for displaying a marker in the visuals.
  Marker LeftForeArm: left_antebrachium (0 0 0)
    # Used for displaying a marker in the visuals.
  Marker LeftHand: left_carpus (0 0 0)
    # Used for displaying a marker in the visuals.
  Marker LeftHand_End: left_forepaw (0 0 0)
    # Used for displaying a marker in the visuals.
  Marker RightShoulder: right_scapula (0 0 0)
    # Used for displaying a marker in the visuals.
  Marker RightArm: right_humerus (0 0 0)
    # Used for displaying a marker in the visuals.
  Marker RightForeArm: right_antebrachium (0 0 0)
    # Used for displaying a marker in the visuals.
  Marker RightHand: right_carpus (0 0 0)
    # Used for displaying a marker in the visuals.
  Marker RightHand_End: right_forepaw (0 0 0)
    # Used for displaying a marker in the visuals.
  Marker LeftUpLeg: left_femur (0 0 0)
    # Used for displaying a marker in the visuals.
  Marker LeftLeg: left_crus (0 0 0)
    # Used for displaying a marker in the visuals.
  Marker LeftFoot: left_calx (0 0 0)
    # Used for displaying a marker in the visuals.
  Marker LeftFoot_End: left_hindpaw (0 0 0)
    # Used for displaying a marker in the visuals.
  Marker RightUpLeg: right_femur (0 0 0)
    # Used for displaying a marker in the visuals.
  Marker RightLeg: right_crus (0 0 0)
    # Used for displaying a marker in the visuals.
  Marker RightFoot: right_calx (0 0 0)
    # Used for displaying a marker in the visuals.
  Marker RightFoot_End: right_hindpaw (0 0 0)
    # Used for displaying a marker in the visuals.
  Marker Tail: cauda (0 0 0)
    # Used for displaying a marker in the visuals.
