# OpenSim document version 40600
Model:
  Ground
  BodySet:
    Body pelvis_body: mass=0.1838 [kg] inertia=(0.001838 0.001838 0.001838 0 0 0)
      PhysicalOffsetFrame pelvis_geom_offset: socket_parent=.. translation=(-0.008158545 -0.25582 -0.2441657) [meters]
          meshes=geometry_hoshiramu\pelvis.obj
      Station psoas_major_l_orig: .. (0.02556403 -0.0002458096 0.1296233)
      Station psoas_major_r_orig: .. (-0.02347038 -0.0002661943 0.124239)
      Station rectus_femoris_r_orig: .. (-0.1006166 -0.09224904 -0.06259592)
      Station rectus_femoris_l_orig: .. (0.08970075 -0.08549571 -0.0591585)
      Station gluteus_medius_l_orig: .. (0.1057841 0.02929032 0.03713974)
      Station gluteus_medius_r_orig: .. (-0.1047701 0.03051639 0.03554061)
      Station semitendinosus_r_orig: .. (-0.1268753 -0.1601452 -0.2057767)
      Station semitendinosus_l_orig: .. (0.1048439 -0.1491155 -0.2016166)
      Station biceps_femoris_l_orig: .. (0.09040638 -0.1450758 -0.1874436)
      Station biceps_femoris_r_orig: .. (-0.1090284 -0.1580107 -0.1935772)
    Body femur_l_body: mass=0.0732 inertia=(0.000732 0.000732 0.000732 0 0 0)
      PhysicalOffsetFrame femur_l_geom_offset: socket_parent=.. translation=(-0.1588039 0.03931463 -0.1853293)
          meshes=geometry_hoshiramu\femur_l.obj
      Station gastrocnemius_l_orig: .. (0.02338445 -0.1505367 0.04836918)
      Station gluteus_medius_l_inse: .. (0.005206063 0.1537708 -0.0786501)
    Body tibia_l_body: mass=0.0589 inertia=(0.000589 0.000589 0.000589 0 0 0)
      PhysicalOffsetFrame tibia_l_geom_offset: socket_parent=.. translation=(-0.1801317 0.4041321 -0.1103111)
          meshes=geometry_hoshiramu\tibia_l.obj
      Station cranial_tibial_l_orig: .. (0.006673828 0.1175426 0.09975705)
      Station semitendinosus_l_inse: .. (-0.02349304 0.06380624 0.06619605)
    Body metatarsal_l_body: mass=0.0372 inertia=(0.000372 0.000372 0.000372 0 0 0)
      PhysicalOffsetFrame metatarsal_l_geom_offset: socket_parent=.. translation=(-0.1787789 0.7482587 -0.071569)
          meshes=geometry_hoshiramu\metatarsal_l.obj
      Station gastrocnemius_l_inse: .. (0.0115236 0.1853158 -0.1515889)
      Station cranial_tibial_l_inse: .. (0.009602427 0.08130085 -0.05678114)
    Body femur_r_body: mass=0.0589 inertia=(0.000589 0.000589 0.000589 0 0 0)
      PhysicalOffsetFrame femur_r_geom_offset: socket_parent=.. translation=(0.1588039 0.03931463 -0.1853293)
          meshes=geometry_hoshiramu\femur_r_mirrored.obj
      Station gastrocnemius_r_orig: .. (-0.02309164 -0.1507304 0.04841588)
      Station gluteus_medius_r_inse: .. (-0.00443764 0.1543965 -0.07893732)
    Body tibia_r_body: mass=0.0478 inertia=(0.000478 0.000478 0.000478 0 0 0)
      PhysicalOffsetFrame tibia_r_geom_offset: socket_parent=.. translation=(0.1801317 0.4041321 -0.1103111)
          meshes=geometry_hoshiramu\tibia_r_mirrored.obj
      Station cranial_tibial_r_orig: .. (-0.005731389 0.1159964 0.09912249)
      Station semitendinosus_r_inse: .. (0.02409126 0.06296659 0.06705272)
    Body metatarsal_r_body: mass=0.0354 inertia=(0.000354 0.000354 0.000354 0 0 0)
      PhysicalOffsetFrame metatarsal_r_geom_offset: socket_parent=.. translation=(0.1787789 0.7482587 -0.071569)
          meshes=geometry_hoshiramu\metatarsal_r_mirrored.obj
      Station gastrocnemius_r_inse: .. (-0.01205534 0.1862808 -0.1511273)
      Station cranial_tibial_r_inse: .. (-0.008701131 0.08133914 -0.05482236)
  JointSet:
    CustomJoint ground_to_pelvis: socket_parent_frame=ground_offset socket_child_frame=pelvis_body_offset
      Coordinate rx: default_value=0 range=(-9.424778 9.424778)
      PhysicalOffsetFrame ground_offset: socket_parent=/ground translation=(0.004079273 0.5743843 0.1220829)
      PhysicalOffsetFrame pelvis_body_offset: socket_parent=/bodyset/pelvis_body
          translation=(-0.004079273 -0.5743843 -0.1220829)
      SpatialTransform:
        TransformAxis rotation1: axis=(1 0 0)
        TransformAxis rotation2: axis=(0 1 0)
        TransformAxis rotation3: coordinates=rx axis=(0 0 1) LinearFunction(coefficients=1 0)
        TransformAxis translation1: axis=(1 0 0)
        TransformAxis translation2: axis=(0 1 0)
        TransformAxis translation3: axis=(0 0 1)
    BallJoint pelvis_to_femur_l: socket_parent_frame=pelvis_body_offset socket_child_frame=femur_l_body_offset
      Coordinate rx: default_value=0
      Coordinate ry: default_value=-0.4917814
      Coordinate rz: default_value=0
      PhysicalOffsetFrame pelvis_body_offset: socket_parent=/bodyset/pelvis_body
          translation=(0.09837725 -0.149976 -0.1015585)
      PhysicalOffsetFrame femur_l_body_offset: socket_parent=/bodyset/femur_l_body
          translation=(-0.05226813 0.1451586 -0.04272206)
    PinJoint femur_l_to_tibia_l: socket_parent_frame=femur_l_body_offset socket_child_frame=tibia_l_body_offset
      Coordinate femur_l_to_tibia_l_rz: default_value=0.1639213
      PhysicalOffsetFrame femur_l_body_offset: socket_parent=/bodyset/femur_l_body
          translation=(0.02199008 -0.2041903 0.03065556) orientation=(2.176863 1.467026 -0.05073735) [radians]
      PhysicalOffsetFrame tibia_l_body_offset: socket_parent=/bodyset/tibia_l_body
          translation=(0.0006622821 0.1606272 0.1056737) orientation=(2.176863 1.467026 -0.05073735)
    PinJoint tibia_l_to_metatarsal_l: socket_parent_frame=tibia_l_body_offset
        socket_child_frame=metatarsal_l_body_offset
      Coordinate tibia_l_to_metatarsal_l_rz: default_value=0
      PhysicalOffsetFrame tibia_l_body_offset: socket_parent=/bodyset/tibia_l_body
          translation=(0.000426814 -0.1825782 -0.1238476) orientation=(-2.09344 1.475748 2.639771)
      PhysicalOffsetFrame metatarsal_l_body_offset: socket_parent=/bodyset/metatarsal_l_body
          translation=(0.001779586 0.1615483 -0.0851055) orientation=(-2.09344 1.475748 2.639771)
    BallJoint pelvis_to_femur_r: socket_parent_frame=pelvis_body_offset socket_child_frame=femur_r_body_offset
      Coordinate rx: default_value=-0.1639562
      Coordinate ry: default_value=0
      Coordinate rz: default_value=0
      PhysicalOffsetFrame pelvis_body_offset: socket_parent=/bodyset/pelvis_body
          translation=(-0.1219753 -0.1499757 -0.1015587)
      PhysicalOffsetFrame femur_r_body_offset: socket_parent=/bodyset/femur_r_body
          translation=(0.04498714 0.145159 -0.0427223)
    PinJoint femur_r_to_tibia_r: socket_parent_frame=femur_r_body_offset socket_child_frame=tibia_r_body_offset
      Coordinate femur_r_to_tibia_r_rz: default_value=0
      PhysicalOffsetFrame femur_r_body_offset: socket_parent=/bodyset/femur_r_body
          translation=(-0.01814583 -0.20419 0.0306557) orientation=(2.176861 1.467026 -0.05073475)
      PhysicalOffsetFrame tibia_r_body_offset: socket_parent=/bodyset/tibia_r_body
          translation=(0.003181964 0.1606275 0.1056739) orientation=(2.176861 1.467026 -0.05073475)
    PinJoint tibia_r_to_metatarsal_r: socket_parent_frame=tibia_r_body_offset
        socket_child_frame=metatarsal_r_body_offset
      Coordinate tibia_r_to_metatarsal_r_rz: default_value=0
      PhysicalOffsetFrame tibia_r_body_offset: socket_parent=/bodyset/tibia_r_body
          translation=(-0.003782049 -0.1825785 -0.1238481) orientation=(-2.093438 1.475748 2.639769)
      PhysicalOffsetFrame metatarsal_r_body_offset: socket_parent=/bodyset/metatarsal_r_body
          translation=(-0.005134821 0.1615481 -0.08510599) orientation=(-2.093438 1.475748 2.639769)
  ForceSet:
    McKibbenActuator right_biceps_femoris_breve:
      PathPoint McKibbenActuator-P1: pelvis_body (-0.1268014 -0.1509731 -0.2046272)
      PathPoint McKibbenActuator-P2: tibia_r_body (-0.008339405 0.0934507 0.1056456)
    McKibbenActuator left_biceps_femoris_breve:
      PathPoint McKibbenActuator-P1: pelvis_body (0.09055662 -0.1480225 -0.1798297)
      PathPoint McKibbenActuator-P2: tibia_l_body (0.009943879 0.1007341 0.1137888)
    McKibbenActuator left_biceps_femoris_longum:
      PathPoint McKibbenActuator-P1: pelvis_body (0.09767724 -0.1492542 -0.1993394)
      PathPoint McKibbenActuator-P2: tibia_l_body (0.01215154 0.05537959 0.06669034)
  ContactGeometrySet:
    ContactHalfSpace floor_cont: socket_frame=/ground orientation=(0 0 1.570796)
