# OpenSim document version 40500
Model Hoshiramu_hindlimb_scaled_x0.4:
  Ground
  BodySet:
    Body pelvis_body: mass=0.1838 [kg] mass_center=(0 0 0) inertia=(0.00029408 0.00029408 0.00029408 0 0 0)
      PhysicalOffsetFrame pelvis_geom_offset: socket_parent=..
          translation=(-0.003263418 -0.0870945 -0.08128246) [meters] meshes=geometry_hoshiramu\pelvis.obj
      Station psoas_major_l_orig: .. (0.01022561 0.01513519 0.06823317)
      Station psoas_major_r_orig: .. (-0.009388153 0.01512704 0.06607943)
      Station rectus_femoris_r_orig: .. (-0.04024662 -0.0216661 -0.008654529)
      Station rectus_femoris_l_orig: .. (0.0358803 -0.01896477 -0.007279563)
      Station gluteus_medius_l_orig: .. (0.04231366 0.02694964 0.03123974)
      Station gluteus_medius_r_orig: .. (-0.04190804 0.02744007 0.03060008)
      Station semitendinosus_r_orig: .. (-0.0507501 -0.04882455 -0.06592684)
      Station semitendinosus_l_orig: .. (0.04193755 -0.04441268 -0.06426281)
      Station biceps_femoris_l_orig: .. (0.03616255 -0.0427968 -0.05859358)
      Station biceps_femoris_r_orig: .. (-0.04361138 -0.04797075 -0.06104704)
    Body femur_l_body: mass=0.0732 mass_center=(0 0 0) inertia=(0.00011712 0.00011712 0.00011712 0 0 0)
      PhysicalOffsetFrame femur_l_geom_offset: socket_parent=.. translation=(-0.06398079 0.02563059 -0.07885858)
          meshes=geometry_hoshiramu\femur_l.obj
      Station gastrocnemius_l_orig: .. (0.008894563 -0.05030992 0.01462082)
      Station gluteus_medius_l_inse: .. (0.001623207 0.07141306 -0.0361869)
      Station iliopsoas_l_inse: .. (-0.006818551 0.05936038 -0.01562455)
      Station vastus_medius_l_orig: .. (-0.01254247 0.05410604 -0.01963196)
      Station vastus_lateralis_l_orig: .. (0.006961268 0.06243746 -0.0220259)
      Station vastus_intermedius_l_orig: .. (0.002781206 0.05770943 -0.01581916)
      WrapEllipsoid femur_wrap_l: xyz_body_rotation=(1.15 3.14 0) translation=(0.004149055 -0.02777042 0.01685424)
          quadrant=x dimensions=(0.012 0.008 0.02)
      WrapSphere pelvis_wrap_l: xyz_body_rotation=(0 180 0) translation=(-0.003891827 0.07735627 -0.02746174)
          quadrant=x radius=0.01
    Body tibia_l_body: mass=0.0589 mass_center=(0 0 0) inertia=(9.424e-5 9.424e-5 9.424e-5 0 0 0)
      PhysicalOffsetFrame tibia_l_geom_offset: socket_parent=.. translation=(-0.07095123 0.1529941 -0.04955282)
          meshes=geometry_hoshiramu\tibia_l.obj
      Station cranial_tibial_l_orig: .. (0.003770983 0.03835831 0.03447445)
      Station semitendinosus_l_inse: .. (-0.008295763 0.01686375 0.02105005)
      Station biceps_femoris_l_inse: .. (-0.001247132 0.01843843 0.02428702)
      Station quadriceps_l_inse: .. (-0.001836598 0.03566246 0.04830485)
      WrapCylinder knee_l: xyz_body_rotation=(0 80 0) translation=(-0.002301574 0.06219127 0.03911024) quadrant=x
          radius=0.024 length=0.04
      WrapSphere tibia_wrap_l: translation=(0.005126959 0.03393116 0.01626615) quadrant=x radius=0.016
      WrapCylinder ankle_wrap_l: xyz_body_rotation=(0 80 90) translation=(0.001115532 -0.082948 -0.0250292) quadrant=x
          radius=0.016 length=0.02
    Body metatarsal_l_body: mass=0.0372 mass_center=(0 0 0) inertia=(5.952e-5 5.952e-5 5.952e-5 0 0 0)
      PhysicalOffsetFrame metatarsal_l_geom_offset: socket_parent=.. translation=(-0.07206179 0.2868464 -0.01760262)
          meshes=geometry_hoshiramu\metatarsal_l.obj
      Station gastrocnemius_l_inse: .. (0.004059225 0.0616693 -0.04961058)
      Station cranial_tibial_l_inse: .. (0.003290755 0.0200633 -0.01168748)
    Body femur_r_body: mass=0.0589 mass_center=(0 0 0) inertia=(9.424e-5 9.424e-5 9.424e-5 0 0 0)
      PhysicalOffsetFrame femur_r_geom_offset: socket_parent=.. translation=(0.06398083 0.02563004 -0.07885867)
          meshes=geometry_hoshiramu\femur_r_mirrored.obj
      Station gastrocnemius_r_orig: .. (-0.008777404 -0.05038795 0.01463941)
      Station gluteus_medius_r_inse: .. (-0.001315802 0.07166281 -0.03630188)
      Station iliopsoas_r_inse: .. (0.006123996 0.0593143 -0.01554509)
      Station vastus_medius_r_orig: .. (0.01236253 0.05424314 -0.01871334)
      Station vastus_lateralis_r_orig: .. (-0.007443875 0.06265039 -0.02276283)
      Station vastus_intermedius_r_orig: .. (-0.003373492 0.05649312 -0.01621541)
      WrapEllipsoid femur_wrap_r: xyz_body_rotation=(1.15 0 0) translation=(-0.008007652 -0.02777042 0.01685424)
          quadrant=x dimensions=(0.012 0.008 0.02)
      WrapSphere pelvis_wrap_r: translation=(0.004985778 0.07748029 -0.02820675) quadrant=x radius=0.01
    Body tibia_r_body: mass=0.0478 mass_center=(0 0 0) inertia=(7.648e-5 7.648e-5 7.648e-5 0 0 0)
      PhysicalOffsetFrame tibia_r_geom_offset: socket_parent=.. translation=(0.07095123 0.1529948 -0.04955299)
          meshes=geometry_hoshiramu\tibia_r_mirrored.obj
      Station cranial_tibial_r_orig: .. (-0.00339402 0.03774049 0.03422046)
      Station semitendinosus_r_inse: .. (0.008535039 0.01652856 0.02139255)
      Station biceps_femoris_r_inse: .. (0.0006311655 0.01827617 0.02697126)
      Station quadriceps_r_inse: .. (0.001746517 0.03592374 0.04828321)
      WrapCylinder knee_r: xyz_body_rotation=(0 80 0) translation=(-0.001513992 0.06338492 0.03922507) quadrant=x
          radius=0.024 length=0.04
      WrapSphere tibia_wrap_r: xyz_body_rotation=(180 180 180) translation=(-0.005693698 0.03230989 0.01870012)
          quadrant=x radius=0.016
      WrapCylinder ankle_wrap_r: xyz_body_rotation=(0 80 90) translation=(-0.0008552551 -0.08294815 -0.02502904)
          quadrant=x radius=0.016 length=0.02
    Body metatarsal_r_body: mass=0.0354 mass_center=(0 0 0) inertia=(5.664e-5 5.664e-5 5.664e-5 0 0 0)
      PhysicalOffsetFrame metatarsal_r_geom_offset: socket_parent=.. translation=(0.07205728 0.2868392 -0.01760689)
          orientation=(0 0 1.82878e-99) [radians] meshes=geometry_hoshiramu\metatarsal_r_mirrored.obj
      Station gastrocnemius_r_inse: .. (-0.004276437 0.06204804 -0.04943022)
      Station cranial_tibial_r_inse: .. (-0.002934754 0.02007137 -0.01090824)
  JointSet:
    FreeJoint ground_to_pelvis: socket_parent_frame=ground_offset socket_child_frame=pelvis_body_offset
      Coordinate ground_to_pelvis_rx: default_value=0
      Coordinate ground_to_pelvis_ry: default_value=0
      Coordinate ground_to_pelvis_rz: default_value=0
      Coordinate ground_to_pelvis_tx: default_value=0
      Coordinate ground_to_pelvis_ty: default_value=0
      Coordinate ground_to_pelvis_tz: default_value=0
      PhysicalOffsetFrame ground_offset: socket_parent=/ground translation=(0.004079273 0.5743843 0.1220829)
      PhysicalOffsetFrame pelvis_body_offset: socket_parent=/bodyset/pelvis_body
          translation=(-0.001631709 -0.2145202 -0.03244931)
    PinJoint pelvis_to_femur_l: socket_parent_frame=pelvis_body_offset socket_child_frame=femur_l_body_offset
      Coordinate pelvis_to_femur_l: default_value=0
      PhysicalOffsetFrame pelvis_body_offset: socket_parent=/bodyset/pelvis_body
          translation=(0.0393509 -0.04475689 -0.02423956) orientation=(0 1.570796 0)
      PhysicalOffsetFrame femur_l_body_offset: socket_parent=/bodyset/femur_l_body
          translation=(-0.02136647 0.0679682 -0.02181568) orientation=(0 1.570796 0)
    PinJoint femur_l_to_tibia_l: socket_parent_frame=femur_l_body_offset socket_child_frame=tibia_l_body_offset
      Coordinate femur_l_to_tibia_l_rz: default_value=0
      PhysicalOffsetFrame femur_l_body_offset: socket_parent=/bodyset/femur_l_body
          translation=(0.008336812 -0.07177138 0.007535368) orientation=(2.176862 1.467026 -0.05073668)
      PhysicalOffsetFrame tibia_l_body_offset: socket_parent=/bodyset/tibia_l_body
          translation=(0.001366365 0.05559213 0.03684113) orientation=(2.176862 1.467026 -0.05073668)
    PinJoint tibia_l_to_metatarsal_l: socket_parent_frame=tibia_l_body_offset
        socket_child_frame=metatarsal_l_body_offset
      Coordinate tibia_l_to_metatarsal_l_rz: default_value=0
      PhysicalOffsetFrame tibia_l_body_offset: socket_parent=/bodyset/tibia_l_body
          translation=(0.001272178 -0.08169004 -0.05496742) orientation=(-2.093441 1.475748 2.639772)
      PhysicalOffsetFrame metatarsal_l_body_offset: socket_parent=/bodyset/metatarsal_l_body
          translation=(0.000161618 0.0521623 -0.02301722) orientation=(-2.093441 1.475748 2.639772)
    PinJoint pelvis_to_femur_r: socket_parent_frame=pelvis_body_offset socket_child_frame=femur_r_body_offset
      Coordinate pelvis_to_femur_r: default_value=0
      PhysicalOffsetFrame pelvis_body_offset: socket_parent=/bodyset/pelvis_body
          translation=(-0.04879013 -0.04475675 -0.02423966) orientation=(0 -1.570796 0)
      PhysicalOffsetFrame femur_r_body_offset: socket_parent=/bodyset/femur_r_body
          translation=(0.01845411 0.0679678 -0.02181587) orientation=(0 -1.570796 0)
    PinJoint femur_r_to_tibia_r: socket_parent_frame=femur_r_body_offset socket_child_frame=tibia_r_body_offset
      Coordinate femur_r_to_tibia_r_rz: default_value=0
      PhysicalOffsetFrame femur_r_body_offset: socket_parent=/bodyset/femur_r_body
          translation=(-0.006799078 -0.07177181 0.007535332) orientation=(2.17686 1.467027 -0.05073447)
      PhysicalOffsetFrame tibia_r_body_offset: socket_parent=/bodyset/tibia_r_body
          translation=(0.0001713216 0.05559292 0.03684101) orientation=(2.17686 1.467027 -0.05073447)
    PinJoint tibia_r_to_metatarsal_r: socket_parent_frame=tibia_r_body_offset
        socket_child_frame=metatarsal_r_body_offset
      Coordinate tibia_r_to_metatarsal_r_rz: default_value=0
      PhysicalOffsetFrame tibia_r_body_offset: socket_parent=/bodyset/tibia_r_body
          translation=(-0.002614284 -0.08168948 -0.05496778) orientation=(-2.093438 1.475748 2.639769)
      PhysicalOffsetFrame metatarsal_r_body_offset: socket_parent=/bodyset/metatarsal_r_body
          translation=(-0.00150823 0.05215495 -0.02302169) orientation=(-2.093438 1.475748 2.639769)
  ForceSet:
    Millard2012EquilibriumMuscle [values shared by the 20 below unless stated]: appliesForce=false min_control=0.01
        max_control=1 optimal_fiber_length=0.04 tendon_slack_length=0.08
      ActiveForceLengthCurve: minimum_value=0
      ForceVelocityCurve: concentric_slope_at_vmax=0 concentric_slope_near_vmax=0.25 isometric_slope=5
          eccentric_slope_at_vmax=0 eccentric_slope_near_vmax=0.15 max_eccentric_velocity_force_multiplier=1.4
      FiberForceLengthCurve
      TendonForceLengthCurve
    Millard2012EquilibriumMuscle biceps_femoris_l:
      PathPoint P1: pelvis_body (0.03616255 -0.0427968 -0.05859358)
      PathPoint P2: tibia_l_body (-0.001247132 0.01843843 0.02428702)
      PathWrap biceps_femoris_l_wrapping: wrap_object=tibia_wrap_l method=hybrid
    Millard2012EquilibriumMuscle biceps_femoris_r:
      PathPoint P1: pelvis_body (-0.04383601 -0.04813578 -0.06095049)
      PathPoint P2: tibia_r_body (0.0006312 0.018276 0.0269712)
      PathWrap biceps_femoris_r_wrapping: wrap_object=tibia_wrap_r method=hybrid
    Millard2012EquilibriumMuscle iliopsoas_l:
      PathPoint P1: pelvis_body (0.01022561 0.01513519 0.06823317)
      PathPoint P2: femur_l_body (-0.006818551 0.05936038 -0.01562455)
    Millard2012EquilibriumMuscle iliopsoas_r:
      PathPoint P1: femur_r_body (0.006123996 0.0593143 -0.01554509)
      PathPoint P2: pelvis_body (-0.009388153 0.01512704 0.06607943)
    Millard2012EquilibriumMuscle gastrocnemius_l:
      PathPoint P1: femur_l_body (0.008894563 -0.05030992 0.01462082)
      PathPoint P2: metatarsal_l_body (0.004059225 0.0616693 -0.04961058)
    Millard2012EquilibriumMuscle gastrocnemius_r:
      PathPoint P1: femur_r_body (-0.008777404 -0.05038795 0.01463941)
      PathPoint P2: metatarsal_r_body (-0.004276437 0.06204804 -0.04943022)
    Millard2012EquilibriumMuscle semitendinosus_l:
      PathPoint P1: pelvis_body (0.04193755 -0.04441268 -0.06426281)
      PathPoint P2: tibia_l_body (-0.008295763 0.01686375 0.02105005)
    Millard2012EquilibriumMuscle semitendinosus_r:
      PathPoint P1: pelvis_body (-0.0507501 -0.04882455 -0.06592684)
      PathPoint P2: tibia_r_body (0.008535039 0.01652856 0.02139255)
    Millard2012EquilibriumMuscle cranial_tibial_l:
      PathPoint P1: tibia_l_body (0.003770983 0.03835831 0.03447445)
      PathPoint P2: metatarsal_l_body (0.003290755 0.0200633 -0.01168748)
      PathWrap cranial_tibial_l_wrapping: wrap_object=ankle_wrap_l method=hybrid
    Millard2012EquilibriumMuscle cranial_tibial_r:
      PathPoint P1: tibia_r_body (-0.00339402 0.03774049 0.03422046)
      PathPoint P2: metatarsal_r_body (-0.002934754 0.02007137 -0.01090824)
      PathWrap cranial_tibial_r_wrapping: wrap_object=ankle_wrap_r method=hybrid
    Millard2012EquilibriumMuscle gluteus_medius_r:
      PathPoint P1: pelvis_body (-0.04190804 0.02744007 0.03060008)
      PathPoint P2: femur_r_body (-0.001315802 0.07166281 -0.03630188)
      PathWrap gluteus_medius_r_wrapping: wrap_object=pelvis_wrap_r method=hybrid
    Millard2012EquilibriumMuscle gluteus_medius_l:
      PathPoint P1: pelvis_body (0.04231366 0.02694964 0.03123974)
      PathPoint P2: femur_l_body (0.001623207 0.07141306 -0.0361869)
      PathWrap gluteus_medius_l_wrapping: wrap_object=pelvis_wrap_l method=hybrid
    Millard2012EquilibriumMuscle rectus_femoris_r:
      PathPoint P1: pelvis_body (-0.04024662 -0.0216661 -0.008654529)
      PathPoint P2: tibia_r_body (0.001746517 0.03592374 0.04828321)
      PathWrap rectus_femoris_r_wrapping: wrap_object=knee_r method=hybrid
    Millard2012EquilibriumMuscle rectus_femoris_l:
      PathPoint P1: pelvis_body (0.0358803 -0.01896477 -0.007279563)
      PathPoint P2: tibia_l_body (-0.001836598 0.03566246 0.04830485)
      PathWrap rectus_femoris_l_wrapping: wrap_object=knee_l method=hybrid
    Millard2012EquilibriumMuscle vastus_medius_r: optimal_fiber_length=0.04000159 tendon_slack_length=0.08000317
      PathPoint P1: femur_r_body (0.01236253 0.05424314 -0.01871334)
      PathPoint P2: tibia_r_body (0.001746517 0.03592374 0.04828321)
      PathWrap vastus_medius_r_wrapping_knee: wrap_object=knee_r method=hybrid
      PathWrap vastus_medius_r_wrapping_femur: wrap_object=femur_wrap_r method=hybrid
    Millard2012EquilibriumMuscle vastus_medius_l: optimal_fiber_length=0.03998135 tendon_slack_length=0.0799627
      PathPoint P1: femur_l_body (-0.01254247 0.05410604 -0.01963196)
      PathPoint P2: tibia_l_body (-0.001836598 0.03566246 0.04830485)
      PathWrap vastus_medius_l_wrapping: wrap_object=knee_l method=hybrid
      PathWrap vastus_medius_l_wrapping_femur: wrap_object=femur_wrap_l method=hybrid
    Millard2012EquilibriumMuscle vastus_lateralis_r: optimal_fiber_length=0.04000005 tendon_slack_length=0.0800001
      PathPoint P1: femur_r_body (-0.007443875 0.06265039 -0.02276283)
      PathPoint P2: tibia_r_body (0.001746517 0.03592374 0.04828321)
      PathWrap vastus_lateralis_r_wrapping: wrap_object=knee_r method=hybrid
      PathWrap vastus_lateralis_r_wrapping_femur: wrap_object=femur_wrap_r method=hybrid
    Millard2012EquilibriumMuscle vastus_lateralis_l: optimal_fiber_length=0.03999991 tendon_slack_length=0.07999981
      PathPoint P1: femur_l_body (0.006961268 0.06243746 -0.0220259)
      PathPoint P2: tibia_l_body (-0.001836598 0.03566246 0.04830485)
      PathWrap vastus_lateralis_l_wrapping: wrap_object=knee_l method=hybrid
      PathWrap vastus_lateralis_l_wrapping_femur: wrap_object=femur_wrap_l method=hybrid
    Millard2012EquilibriumMuscle vastus_intermedius_r: optimal_fiber_length=0.04000003 tendon_slack_length=0.08000006
      PathPoint P1: femur_r_body (-0.003373492 0.05649312 -0.01621541)
      PathPoint P2: tibia_r_body (0.001746517 0.03592374 0.04828321)
      PathWrap vastus_intermedius_r_wrapping: wrap_object=knee_r method=hybrid
      PathWrap vastus_intermedius_r_wrapping_femur: wrap_object=femur_wrap_r method=hybrid
    Millard2012EquilibriumMuscle vastus_intermedius_l: optimal_fiber_length=0.03999986 tendon_slack_length=0.07999971
      PathPoint P1: femur_l_body (0.002781206 0.05770943 -0.01581916)
      PathPoint P2: tibia_l_body (-0.001836598 0.03566246 0.04830485)
      PathWrap vastus_intermedius_l_wrapping: wrap_object=knee_l method=hybrid
      PathWrap vastus_intermedius_l_wrapping_femur: wrap_object=femur_wrap_l method=hybrid
    HuntCrossleyForce:
      ContactParametersSet contact_parameters:
        ContactParameters: geometry=(floor_contact metatarsal_r_contact_1 metatarsal_l_contact_1 metatarsal_r_contact_2 metatarsal_r_contact_3 metatarsal_l_contact_2 metatarsal_l_contact_3)
            stiffness=100000000 dissipation=0.5 static_friction=0.9 dynamic_friction=0.9 viscous_friction=0.6
  MarkerSet:
    Marker Hips: pelvis_body (0 0 0)
    Marker LeftUpLeg: femur_l_body (0 0.06080642 -0.03007242)
    Marker RightUpLeg: femur_r_body (0 0.0608064 -0.0300724)
    Marker RightLeg: tibia_r_body (-3.242191e-19 0.0490201 0.05131531)
    Marker LeftLeg: tibia_l_body (0 0.04902 0.0513152)
    Marker LeftFoot: metatarsal_l_body (3.795541e-19 0.0449127 -0.03512589)
    Marker RightFoot: metatarsal_r_body (0 0.0449128 -0.035126)
    Marker LeftFoot_End: metatarsal_l_body (0 -0.0582728 0.0762076)
    Marker RightFoot_End: metatarsal_r_body (0 -0.0582728 0.0762076)
  ContactGeometrySet:
    ContactHalfSpace floor_contact: socket_frame=/ground orientation=(0 0 -1.570796)
    ContactSphere metatarsal_r_contact_1: socket_frame=/bodyset/metatarsal_r_body location=(0.002425 -0.04467 0.027501)
        radius=0.012
    ContactSphere metatarsal_l_contact_1: socket_frame=/bodyset/metatarsal_l_body
        location=(-0.002425 -0.04467 0.027501) radius=0.012
    ContactSphere metatarsal_r_contact_2: socket_frame=/bodyset/metatarsal_r_body
        location=(-0.0074568 -0.052176 0.052125) radius=0.008
    ContactSphere metatarsal_r_contact_3: socket_frame=/bodyset/metatarsal_r_body
        location=(0.015033 -0.052176 0.052125) radius=0.008
    ContactSphere metatarsal_l_contact_2: socket_frame=/bodyset/metatarsal_l_body
        location=(0.0074568 -0.052176 0.052125) radius=0.008
    ContactSphere metatarsal_l_contact_3: socket_frame=/bodyset/metatarsal_l_body
        location=(-0.015033 -0.052176 0.052125) radius=0.008
